// SBML level 2 version 4

model New_Model()
  // PK_base

  // Compartments:
  compartment Patient = 1;

  // Species:
  species circulation_concentration in Patient = 1578;
  species periphery_concentration in Patient = 0;

  // Parameters:
  lambda = 0.0027;
  k12 = 0.0048;
  k21 = 0.0048;

  // Reactions:
  elimination: circulation_concentration => ; Patient*lambda*circulation_concentration;
  Q12: circulation_concentration -> periphery_concentration; Patient*(k12*circulation_concentration - k21*periphery_concentration);

  // Unit definitions:
  unit length = metre;
  unit area = metre^2;
  unit volume = litre;
  unit time = second;
  unit substance = mole;
end
