// SBML level 2 version 4

model PK_default()

  // Compartments:
  compartment Patient = 1;

  // Species:
  species circulation_concentration in Patient = 0;
  species periphery_concentration in Patient = 0;

  // Parameters:
  lambda = 0.0027;
  k12 = 0.0048;
  k21 = 0.0048;

  // Reactions:
  elimination: circulation_concentration => ; Patient*lambda*circulation_concentration;
  Q12: circulation_concentration -> periphery_concentration; Patient*(k12*circulation_concentration - k21*periphery_concentration);

  // Events:
  Dose_1: at (time > 60): circulation_concentration = circulation_concentration + 500;
  Dose_2: at (time > 240): circulation_concentration = circulation_concentration + 500;
  Dose_3: at (time > 360): circulation_concentration = circulation_concentration + 500;
  Dose_4: at (time > 720): circulation_concentration = circulation_concentration + 500;
  Dose_5: at (time > 1080): circulation_concentration = circulation_concentration + 500;

  // Unit definitions:
  unit length = metre;
  unit area = metre^2;
  unit volume = litre;
  unit time = second;
  unit substance = mole;
end
