// SBML level 2 version 4

function Rate_Law_for_drug_transport(PKPD_D1_p, PKPD_D1_c, k)
  k*(PKPD_D1_p - PKPD_D1_c);
end

model PDynamics()

  // Compartments:
  compartment volume = 10; volume is "Vc";
  compartment Vp = 1;

  // Species:
  species PKPD_D1 in Vp = 0; PKPD_D1 is "PKPD_D1_p";
  species PKPD_D1_c in volume = 100;

  // Parameters:
  linear_metabolism_rate = 0.0001 unit_0; linear_metabolism_rate is "lambda";
  k = 0.0008 unit_0;

  // Reactions:
  drug_transport: PKPD_D1 -> PKPD_D1_c; volume*Rate_Law_for_drug_transport(PKPD_D1, PKPD_D1_c, k);
  drug_decay: PKPD_D1_c => ; volume*linear_metabolism_rate*PKPD_D1_c;

  // Events:
  pe_event_1: at (time > 360): PKPD_D1_c = PKPD_D1_c + 100;
  pe_event_2: at (time > 720): PKPD_D1_c = PKPD_D1_c + 100;
  pe_event_3: at (time > 1080): PKPD_D1_c = PKPD_D1_c + 10;
  pe_event_4: at (time > 1440): PKPD_D1_c = PKPD_D1_c + 10;

  // Unit definitions:
  unit length = metre;
  unit area = metre^2;
  unit volume = litre;
  unit time = 0.06 second;
  unit substance = mole;
  unit unit_0 = 1 / (0.06 second); unit_0 is "1/min";
end
